<Node name="root" dt="0.05" gravity="0.0 -10 0">
  <RequiredPlugin pluginName="SofaCV"/>
  <RequiredPlugin pluginName="ImageProcessing"/>

  <VideoGrabber name="grabber" videoFile="Lenna.png" />
  <PointPicker2D autolink="true" points="10 100 50 50 25 25 100 100"/>
  <FrameViewer name="viewer" img="@[-1].img_out" corners="-1 1 0  1 1 0  1 -1 0  -1 -1 0" mode="PROJ" />
</Node>
