<Node name="root" dt="0.05" gravity="0.0 -10 0">
  <RequiredPlugin pluginName="SofaCV"/>
  <RequiredPlugin pluginName="DataAcquisition"/>
  <RequiredPlugin pluginName="ImageProcessing"/>

  <VideoGrabber videoFile="LennaGray_100px.png" />
  <!-- Scaling values from 0-255 range to 0-1 range -->
  <ConvertTo scale="0.00392156862745098" template="float" img="@[-1].img_out" />
  <FrameViewer name="viewer" img="@[-1].img_out" corners="-1 1 0  1 1 0  1 -1 0  -1 -1 0" mode="PROJ" />
</Node>
